folder Simulations: version=37; creator=Apsim 7.10-r4191
  simulation
    clock
      start_date = 01/01/2000  # Enter the start date of the simulation
      end_date = 31/01/2000  # Enter the end date of the simulation
    metfile met
      filename=C:\Users\snowv\OneDrive - AgResearch\Desktop\Temp\SWIM\NoRainEvap.met
    summaryfile
    area Paddock
      micromet
        soilalbedo = 0.23
        a_interception = 0
        b_interception = 0
        c_interception = 0
        d_interception = 0
      fertiliser
      irrigation
        automatic_irrigation = off
        asw_depth = 600  # Depth to which ASW is calculated. (mm)
        crit_fr_asw = 0.5  # Fraction of ASW below which irrigation is applied (0-1.0)
        irrigation_efficiency = 1  # Efficiency of the irrigation. (0-1.0)
        irrigation_allocation = off  # Allocation limits
        allocation = 0  # Allocation in mm
        default_no3_conc = 0  # Nitrate concentration (ppm N)
        default_nh4_conc = 0  # Ammonium concentration (ppm N)
        default_cl_conc = 0  # Chloride concentration (ppm Cl)
      surfaceom SurfaceOrganicMatter
        PoolName = AgPasture  # Organic Matter pool name
        type = grass  # Organic Matter type
        mass = 1000  # Initial surface residue (kg/ha)
        cnr = 15  # C:N ratio of initial residue
        standing_fraction = 0  # Fraction of residue standing
      Soil SWIMSoil: Latitude=0; Longitude=0; YearOfSampling=0
        Water
          Thickness  BD     AirDry  LL15   DUL    SAT   KS
          60         0.865  0.077   0.231  0.565  0.58  216
          110        0.865  0.077   0.231  0.565  0.58  216
          140        0.865  0.077   0.231  0.565  0.58  216
          240        0.865  0.077   0.231  0.565  0.58  216
          150        0.865  0.077   0.231  0.565  0.58  216
        SoilOrganicMatter: RootCN=40; RootWt=800; SoilCN=12.5; EnrACoeff=7.4; EnrBCoeff=0.2; OCUnits=Total
          Thickness  OC   FBiom  FInert
          60         8.2  0.08   0.58
          110        5.5  0.02   0.7
          140        3.3  0.015  0.77
          240        1.7  0.01   0.9
          150        1.7  0.01   0.99
        Swim: Salb=0.13; CN2Bare=50; CNRed=20; CNCov=0.8; KDul=1; PSIDul=-100; VC=true; DTmin=0; DTmax=1440; MaxWaterIncrement=10; SpaceWeightingFactor=0; SoluteSpaceWeightingFactor=1; Diagnostics=false
          SwimSoluteParameters: Dis=15; Disp=1; A=1; DTHP=1
            zero: DTHC, WaterTableCl, WaterTableNO3, WaterTableNH4, WaterTableUrea, WaterTableTracer, WaterTableMineralisationInhibitor, WaterTableUreaseInhibitor, WaterTableNitrificationInhibitor, WaterTableDenitrificationInhibitor
            Thickness  NO3Exco  NO3FIP  NH4Exco  NH4FIP  UreaExco  UreaFIP  ClExco  ClFIP
            1000       0        1       100      1       0         1        0       1
            1000       0        1       100      1       0         1        0       1
            1000       0        1       100      1       0         1        0       1
        Analysis: PHUnits=Water; BoronUnits=HotWater
          Thickness  PH   ParticleSizeSand  ParticleSizeSilt  ParticleSizeClay
          60         6.5  17.61             33.77             48.62
          110        6.5  17.61             33.77             48.62
          140        6.5  17.61             33.77             48.62
          240        6.5  17.61             33.77             48.62
          150        6.5  17.61             33.77             48.62
        InitialWater: FractionFull=1; PercentMethod=FilledFromTop
        Sample Initial nitrogen: NO3Units=ppm; NH4Units=ppm; SWUnits=Volumetric; OCUnits=Total; PHUnits=Water
          Thickness  NO3    NH4
          60         6.503  0.599
          110        2.101  0.1
          140        2.101  0.1
          240        1.701  0.1
          150        1.701  0.1
        LayerStructure: Thickness=[10, 20, 30, 40, 50, 50, 50, 50, 100, 100, 50, 50, 50, 50]
      manager2 CalcWatBal
        # Parameters to control the reporting
        OutputModuleName = Sim  # Name of the output component for reporting
        ReportingFreq = Daily  # Frequency of reporting
        FertiliserDate = 15-Feb  # For FertiliserDate outputting (summary)
        FertYearString = 15-Feb-1979  # Cant get the dates right (summary)
        FertiliserAmount = 100  # For FertiliserAmount outputting
        Weather = Ruakura  # Weather location
        SoilPAWasSet = PAW067mm  # Soil type PAW
        SoilFert = MedFert  # Soil type fertility
```csharp
using System;
using ModelFramework;
using CSGeneral;

public class Script 
{      
   [Link] Simulation simulation;
   [Link] Clock clock;   
   [Link()] Paddock paddock;
   [Link] Swim swim;   
   [Link] MetFile weather;   
   [Link] Irrigation irrigation;   
   //[Link] Swim swim;   
   
   //[Param] public string OutputModuleName; 
   
   [Output] public double WaterBalanceCumulative;
   [Output] public double WaterBalanceToday;

   [Output] public double SoilWaterAtInitialisation;
   [Output] public double SoilWaterYesterday;
   [Output] public double SoilWaterNow;
   
   [Output] public double WaterAddedToday;
   [Output] public double WaterAddedCumulative;
   [Output] public double WaterRemovedToday;
   [Output] public double WaterRemovedCumulative;
  
   [Input] private DateTime Today;   
   

   //SoilWat SoilWat;
   //Swim SoilWat;
      
   [EventHandler] public void OnInitialised()
   {
      
   } // end of Initialisation


   [EventHandler] public void OnPrepare()
   {
     
      if (clock.is_start_simulation)
      {
         SoilWaterAtInitialisation = swim.pond;
         for (int i = 0; i < swim.sw_dep.Length; i++)
            SoilWaterAtInitialisation += swim.sw_dep[i];

         SoilWaterYesterday = SoilWaterAtInitialisation;		// for initialisation only
         WaterAddedCumulative = 0.0;
         WaterRemovedCumulative = 0.0;
         SoilWaterNow = 0.0;
      }
      else
      {
         SoilWaterYesterday = SoilWaterNow;		// this was calculated at reporting yesterday
         WaterAddedToday = 0.0;
         WaterRemovedToday = 0.0;
      }
   } // this is the end of Prepare


   [EventHandler] public void OnPost()
   {
      SoilWaterNow = swim.pond;
      for (int i = 0; i < swim.sw_dep.Length; i++)
         SoilWaterNow += swim.sw_dep[i];

      WaterAddedToday = weather.Rain + irrigation.irrigation;   // Can there be runon? Probably not but this will throw an error if that ever happens
      WaterAddedCumulative += WaterAddedToday;
      WaterRemovedToday = swim.drain + swim.es + swim.runoff; // Need to add subsurface drainage here
      WaterRemovedCumulative += WaterRemovedToday;

      WaterBalanceToday = WaterAddedToday - WaterRemovedToday - (SoilWaterNow - SoilWaterYesterday);
      WaterBalanceCumulative = WaterAddedCumulative - WaterRemovedCumulative - (SoilWaterNow - SoilWaterAtInitialisation);

   } // end of Post
   

}
```
      outputfile: filename=Simulation.out; title=Simulation
        variables
          variables: dd/mmm/yyyy as Date, WaterBalanceCumulative, WaterBalanceToday, sw_dep(), drain, es
        events Reporting Frequency: event=end_day
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